*Heading
TEST SPHERICAL
** Job name: TEST_INDENT Model name: Model-1
** To be run with user subroutine UMAT_NKH_1.02.for
***
***
*Preprint, echo=NO, model=NO, history=NO, contact=NO
**
**
*Node
      1,           0.,           0.
      2,   0.03756798,           0.
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*******************************************************
****************N O D E  S E T S***********************
*******************************************************
*Nset, nset=POINT
500,
*Nset, nset=POINTA
 500,
*Nset, nset=_PickedSet8
  1,  21,   1
*Nset, nset=_PickedSet9, generate
   1,  421,   21
*NSET,NSET=__PickedSurf7_S3, generate
421,441,1
*******************************************************
**************E L E M E N T S**************************
*******************************************************
*Element, type=CAX4
  1,   1,   2,  23,  22
  2,   2,   3,  24,  23
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*********************************************************************
***********E L E M E N T  S E T S************************************
*********************************************************************
*Elset, elset=_PickedSet8, generate
  1,  20,   1
*Elset, elset=_PickedSet9, generate
   1,  381,   20
*Elset, elset=_PickedSet2, generate
   1,  400,    1
*******************************************************
*******************************************************
********
*Solid Section, elset=_PickedSet2, material=Material-1
1.,
*******************************************************
*Surface, type=SEGMENTS, name=RigidSurface_
START,           1.,           4.
 CIRCL,          0.,           3.,           0.,           4.
 LINE,           0.,           4.
 LINE,           1.,           4.
*Rigid Body, ref node=POINT, analytical surface=RigidSurface_
*Surface, type=NODE, name=_PickedSurf7
__PickedSurf7_S3
*********************************************************************
**********I N T E R A C T I O N  P R O P E R T I E S*****************
*********************************************************************
*********************************************************************
**
*Surface Interaction, name=IntProp-1
1.,
*Friction
0.,
*Surface Behavior, pressure-overclosure=HARD
**
** Interaction: Int-1
*Contact Pair, interaction=IntProp-1
_PickedSurf7, RigidSurface_
**
**
*********************************************************************
*******************M A T E R I A L S*********************************
*********************************************************************
*MATERIAL, NAME=Material-1
*USER MATERIAL,CONSTANTS=24
*INCLUDE,INPUT=MATERIAL_NKH.inp
*DEPVAR
16
**
*********************************************************************
**************S T E P  D E F I N I T I O N***************************
*********************************************************************
**
*Step, name=Step-1
INICIAL
*Static
0.05, 1., 1e-05, 0.25
**
** BOUNDARY CONDITIONS
**
** Name: BC-1 Type: Displacement/Rotation
*Boundary
_PickedSet8, 2, 2
** Name: BC-2 Type: Displacement/Rotation
*Boundary
_PickedSet9, 1, 1
**
*BOUNDARY
POINTA, 6, 6, 0
POINTA, 2, 2, -1.0E-01
*******************************************************************
****************O U T P U T  R E Q U E S T S***********************
*******************************************************************
*Restart, write, frequency=1
**
** FIELD OUTPUT: F-Output-1
*output, field
*element output,elset=_PickedSet2
s,e
**
**
** HISTORY OUTPUT: H-Output-1
**
*Output, history,freq=9999999
*element output,elset=_PickedSet2
sdv9
*El Print
SDV9
*Node Print, freq=999999
*End Step
