*HEADING
 Microbending-thickness 25.0 microns-Couple Stress solid
*NODE
    1, 0.00000, 0.00000
    2, 0.00500, 0.00000
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***********************************************************************
***********************************************************************
*USER ELEMENT,NODES=9,TYPE=U1,PROPERTIES=26,COORDINATES=2,VARIABLES=316
 1,2,6
***********************************************************************
*ELEMENT,TYPE=U1, ELSET=TODOS
    1,   1,   3, 105, 103,   2,  54, 104,  52,  53
    2,   3,   5, 107, 105,   4,  56, 106,  54,  55
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*ELSET,ELSET=RESULTS
101
*ELSET,ELSET=LEDGE
1,26,51,76,
101
***************************************************
***************************************************
*NSET,NSET=LEFT1
1,52,103,154,205,
256,307,358,409,460,
511
*NSET,NSET=LEFT2
256
*NSET, NSET=EDGE
561
*NSET,NSET=REDGE1
51,102,53,204,
255,306,357,408,
459,510,561
*NSET,NSET=REDGE2
306
**
***************************************************
**************MATERIAL PROPERTIES******************
***************************************************
*UEL PROPERTY,ELSET=TODOS
*INCLUDE, INPUT=material_co.inp
***************************************************
***************************************************
****
****
**************STEP: Step-1*************************
***************************************************
**
*Step,INC=10000000, EXTRAPOLATION=NO, name=Step-1
elastoplastic anaylisis
*Static,direct
0.05, 10.0
*AMPLITUDE,NAME=DIS,INPUT=FATIGA.DAT
***************************************************
** BOUNDARY CONDITIONS
**
** Name: BC-1 Type: Displacement/Rotation
*Boundary
LEFT1,1,1,0.0
LEFT2,2,2,0.0
LEFT2,6,6,0.0
**
**
*PRINT,FREQUENCY=100
**
***
*****
**************LOADS************************
**************LOADS************************
*******************************************
**ACTIVATE THIS LINE FOR FORC. CONTROLLED**
*******************************************
** Name: Load-1   Type: Concentrated force
*Cload,AMPLITUDE=DIS
EDGE, 2,0.0504
**
*MONITOR, NODE=561,DOF=2
**
******************************************
******* OUTPUT REQUEST*********************
*******************************************
**********************
***stress-strains*****
**********************
*ELPRINT, ELSET=RESULTS, FREQUENCY=1
SDV217,SDV205,SDV220,SDV208,SDV236
**
*End Step
